mM := 45 gm
mC := 200 gm
mE := 60 gm
mECU := 60 gm
mS := 300 gm
mBat := 400 gm
mTotal := mM + mC + mE + mECU + mS + mBat
mTotal = 1.065 kg
TWR := 3
Ttotal := mTotal*g*TWR
g = 9.80665 m/s^2
Ttotal = 31.3322 N
GramsPerMotor := mTotal*TWR/4
GramsPerMotor = 798.75 gm
